<Lems>

    <!-- Specify which component to run -->
    <Target component="sim1"/>

    <!-- Include core NeuroML2 ComponentType definitions -->
    <Include file="Cells.xml"/>
    <Include file="Networks.xml"/>
    <Include file="Simulation.xml"/>

    <Include file="LEMS_ASH_Input.xml"/>
    <Include file="ASH.nml"/>
    <Include file="ASH_Stim.net.nml"/>

    <ASH_Cell id="ASH">
        <notes>ASH cell...</notes>
    </ASH_Cell>

    <Simulation id="sim1" length="60s" step="1ms" target="net1">

        <Display id="d" title="ASH components (uM)" xmin="-500" xmax="55000" ymin="0" ymax="6" timeScale="1ms">
            <Line id="J_PMCA" timeScale="1ms" quantity="ASH_pop/0/ASH/J_PMCA" scale="1 uM" color="#0000FF"/>
            <Line id="J_SERCA" timeScale="1ms" quantity="ASH_pop/0/ASH/J_SERCA" scale="1 uM" color="#B5651D"/>
            <Line id="J_TRPV" timeScale="1ms" quantity="ASH_pop/0/ASH/J_TRPV" scale="1 uM" color="#FFFF00"/>
            <Line id="J_IPR" timeScale="1ms" quantity="ASH_pop/0/ASH/J_IPR" scale="1 uM" color="#8A2BE2"/>
            <Line id="J_LeakER" timeScale="1ms" quantity="ASH_pop/0/ASH/J_LeakER" scale="1 uM" color="#00FFFF"/>
            <Line id="J_Leak" timeScale="1ms" quantity="ASH_pop/0/ASH/J_Leak" scale="1 uM" color="#008888"/>
            <Line id="S" timeScale="1ms" quantity="ASH_pop/0/ASH/S" scale="1 M" color="#FF0000"/>
            <Line id="J_VGCC" timeScale="1ms" quantity="ASH_pop/0/ASH/J_VGCC" scale="1 uM" color="#00FF00"/>
        </Display>

        <Display id="d11" title="Ca concentration (uM)" xmin="-500" xmax="55000" ymin="0" ymax="5" timeScale="1ms">
            <Line id="Ca concentration" timeScale="1ms" quantity="ASH_pop/0/ASH/caConc" scale="1 uM" color="#000000"/>
        </Display>

        <Display id="d12" title="Ca concentration ER (uM)" xmin="-500" xmax="55000" ymin="-1" ymax="300" timeScale="1ms">
            <Line id="Ca concentration ER" timeScale="1ms" quantity="ASH_pop/0/ASH/concentrationER" scale="1 uM" color="#000000"/>
        </Display>

        <Display id="d18" title="ASH V (mV)" xmin="-500" xmax="55000" ymin="-80" ymax="40" timeScale="1ms">
            <Line id="ASH V" timeScale="1ms" quantity="ASH_pop/0/ASH/DV" scale="1 mV" color="#000000"/>
        </Display>

        <!--<Display id="d17" title="Ca concentration J_VGCC (mM)" xmin="-500" xmax="20500" ymin="-1e-8" ymax="15e-8" timeScale="1ms">
            <Line id="Ca concentration J_VGCC" timeScale="1ms" quantity="ASH_pop/0/ASH/J_VGCC" scale="1 mM" color="#000000"/>
        </Display>-->
        <!--<Display id="d18" title="ASH V (mV)" xmin="-500" xmax="20500" ymin="-80" ymax="80" timeScale="1ms">
            <Line id="ASH V" timeScale="1ms" quantity="ASH_pop/0/ASH/V" scale="1 mV" color="#000000"/>
        </Display>-->

        <!--<Display id="d2" title="Ca concentration (mM)" xmin="-500" xmax="20500" ymin="-1e-8" ymax="15e-8" timeScale="1ms">
            <Line id="Ca concentration" timeScale="1ms" quantity="mc1/ASH/caConc" scale="1 mM" color="#000000"/>
        </Display>-->

        <OutputFile id="caConc" fileName="ASH_CaConc.dat">
            <OutputColumn id="caConc" quantity="ASH_pop/0/ASH/caConc"/>
        </OutputFile>
        <OutputFile id="v" fileName="ASH_V.dat">
            <OutputColumn id="v" quantity="ASH_pop/0/ASH/v"/>
        </OutputFile>
        <OutputFile id="PMCA" fileName="ASH_PMCA.dat">
            <OutputColumn id="PMCA" quantity="ASH_pop/0/ASH/J_PMCA"/>
        </OutputFile>
        <OutputFile id="SERCA" fileName="ASH_SERCA.dat">
            <OutputColumn id="SERCA" quantity="ASH_pop/0/ASH/J_SERCA"/>
        </OutputFile>
        <OutputFile id="TRPV" fileName="ASH_TRPV.dat">
            <OutputColumn id="TRPV" quantity="ASH_pop/0/ASH/J_TRPV"/>
        </OutputFile>
        <OutputFile id="IPR" fileName="ASH_IPR.dat">
            <OutputColumn id="IPR" quantity="ASH_pop/0/ASH/J_IPR"/>
        </OutputFile>
        <OutputFile id="LeakER" fileName="ASH_LeakER.dat">
            <OutputColumn id="LeakER" quantity="ASH_pop/0/ASH/J_LeakER"/>
        </OutputFile>
        <OutputFile id="VGCC" fileName="ASH_VGCC.dat">
            <OutputColumn id="VGCC" quantity="ASH_pop/0/ASH/J_VGCC"/>
        </OutputFile>
        <OutputFile id="Stimulus" fileName="ASH_Stimulus.dat">
            <OutputColumn id="Stimulus" quantity="ASH_pop/0/ASH/S"/>
        </OutputFile>
        <OutputFile id="caConcER" fileName="ASH_caConcER.dat">
            <OutputColumn id="Stimulus" quantity="ASH_pop/0/ASH/concentrationER"/>
        </OutputFile>
    </Simulation>

</Lems>
